# LAMMPS CG Simulation: PS-b-PMMA
# MARTINI 3 adapted | N_PS=20 N_PMMA=20 T=500.0K chiN=1.99

units           real
atom_style      molecular
boundary        p p p
read_data       bcp_cg_initial.data

pair_style      lj/cut 1.2
pair_modify     shift yes
bond_style      harmonic
angle_style     harmonic
dihedral_style  cosine/squared

# pair_coeff: TC5=1, SC3=2, SC2=3, SC1=4
pair_coeff  1 1  3.100  4.300  12.0
pair_coeff  1 2  2.900  4.150  12.0
pair_coeff  1 3  1.800  4.150  12.0  # PS-PMMA repulsive
pair_coeff  2 2  2.700  4.300  12.0
pair_coeff  2 3  1.900  4.300  12.0  # PS-PMMA repulsive
pair_coeff  3 3  2.500  4.300  12.0
pair_coeff  3 4  2.500  4.300  12.0
pair_coeff  4 4  2.700  4.300  12.0

bond_coeff  1  3800.0  4.70
bond_coeff  2  5000.0  2.90
bond_coeff  3  3800.0  4.70
bond_coeff  4  4500.0  3.10
bond_coeff  5  3500.0  4.70

angle_coeff 1  25.0  180.0
angle_coeff 2  25.0  150.0
angle_coeff 3  20.0  180.0
angle_coeff 4  25.0  120.0

minimize        1.0e-4 1.0e-6 1000 10000

fix             1 all npt temp 500.0 500.0 1000.0 iso 1.0 1.0 5000.0
timestep        10.0
thermo          1000
thermo_style    custom step temp press pe ke etotal vol density
dump            eq all custom 5000 eq_trajectory.lammpstrj id mol type x y z
run             2000000      # 20 ns equilibration

unfix           1
fix             2 all nvt temp 500.0 500.0 1000.0
reset_timestep  0
dump            prod all custom 1000 prod_trajectory.lammpstrj id mol type x y z
run             5000000      # 50 ns production

write_data      bcp_cg_final.data
write_restart   bcp_cg.restart
