# LAMMPS: BCP Nucleation & Growth Protocol
# Controlled cooling from disordered melt (T > T_ODT) to ordered state

units           real
atom_style      molecular
boundary        p p p
read_data       bcp_cg_initial.data

# [Force field same as equilibration run - include here]
include         forcefield.inc

# ── Step 1: Melt at T=600K (above ODT) ──────────────────
fix             melt all nvt temp 600.0 600.0 500.0
timestep        10.0
run             500000    # 5 ns melt
write_restart   melt_600K.restart

# ── Step 2: Quench to T_ODT+5K (near ODT, watch nucleation) ──
unfix           melt
variable        T_ODT equal 530.0     # estimated ODT temperature for this system
fix             quench all nvt temp 600.0 ${T_ODT} 1000.0
run             200000    # 2 ns linear cool
unfix           quench

# ── Step 3: Hold at T_ODT+5K, track S(q) for nucleation ──
fix             hold1 all nvt temp ${T_ODT} ${T_ODT} 500.0
compute         sq all structure/factor 100 1.0 sq_output.dat
fix             sq_avg all ave/time 100 10 1000 c_sq mode vector file sq_time.dat
dump            nuc all custom 2000 nucleation.lammpstrj id mol type x y z
run             2000000   # 20 ns: observe nucleation

# ── Step 4: Cool to T=500K (strong segregation) ──────────
unfix           hold1
fix             cool all nvt temp ${T_ODT} 500.0 2000.0
run             1000000   # 10 ns

# ── Step 5: Anneal at T=500K ─────────────────────────────
unfix           cool
fix             anneal all nvt temp 500.0 500.0 500.0
run             5000000   # 50 ns annealing
write_data      after_anneal.data
write_restart   annealed.restart
