# ============================================================
# LAMMPS Input Script: Block Copolymer Self-Assembly (CG-DPD)
# ============================================================
units           lj
dimension       3
boundary        p p p
atom_style      molecular

variable        N       equal 32
variable        N_A     equal 16
variable        n_chain equal 500
variable        L       equal 40.0
variable        T       equal 1.0
variable        dt_sim  equal 0.005

region          box block 0 ${L} 0 ${L} 0 ${L}
create_box      2 box bond/types 1 extra/bond/per/atom 2

molecule        diblock diblock.mol
create_atoms    0 random ${n_chain} 12345 box mol diblock 67890

pair_style      dpd ${T} 1.5 12345
pair_coeff      1 1 25.0 4.5 1.5
pair_coeff      2 2 25.0 4.5 1.5
pair_coeff      1 2 40.0 4.5 1.5

bond_style      fene
bond_coeff      1 30.0 1.5 1.0 1.0
special_bonds   fene

neighbor        0.5 bin
neigh_modify    every 1 delay 0 check yes

velocity        all create ${T} 87654 dist gaussian
fix             1 all nve
fix             2 all langevin ${T} ${T} 1.0 48279
timestep        ${dt_sim}

# Soft push-off
pair_style      soft 1.5
pair_coeff      * * 10.0
run             5000
unfix           1
unfix           2

# DPD production
pair_style      dpd ${T} 1.5 12345
pair_coeff      1 1 25.0 4.5 1.5
pair_coeff      2 2 25.0 4.5 1.5
pair_coeff      1 2 40.0 4.5 1.5

fix             1 all nve
fix             2 all langevin ${T} ${T} 1.0 48279

thermo          1000
thermo_style    custom step temp pe ke press vol
dump            1 all custom 5000 traj.lammpstrj id mol type x y z
compute         myChunk all chunk/atom bin/2d x lower 1.0 y lower 1.0
fix             density all ave/chunk 100 10 1000 myChunk density/atom file density_profile.dat

run             2000000

# Annealing
variable        T_anneal equal 1.5
fix             2 all langevin ${T_anneal} 0.8 1.0 48279
run             500000
fix             2 all langevin 0.8 0.8 1.0 48279
run             1000000

write_data      final_config.data
print "=== Simulation Complete ==="
