# LAMMPS input script for EC/DMC/LiPF6 electrolyte simulation
# Force field: OPLS-AA with scaled charges (0.8)

units           real
atom_style      full
boundary        p p p
pair_style      lj/cut/coul/long 12.0
kspace_style    pppm 1.0e-5
bond_style      harmonic
angle_style     harmonic
dihedral_style  opls

# Read data
read_data       ec_dmc_lipf6.data

# Force field parameters (scaled charges)
# Li+
pair_coeff  1 1  0.1660  1.5060  # Li-Li (sigma in Angstrom, eps in kcal/mol)
# P (PF6-)
pair_coeff  2 2  0.2000  3.7400
# F (PF6-)
pair_coeff  3 3  0.0610  3.1180

# Mixing rules: arithmetic/geometric (Lorentz-Berthelot)
pair_modify     mix arithmetic

# Neighbor list
neighbor        2.0 bin
neigh_modify    delay 0 every 1 check yes

# ---- Energy Minimization ----
minimize        1.0e-4 1.0e-6 10000 100000

# ---- NVT Equilibration ----
velocity        all create 298.15 12345 dist gaussian
fix             1 all nvt temp 298.15 298.15 100.0
timestep        1.0
thermo          1000
thermo_style    custom step temp press pe ke etotal density
run             500000
unfix           1

# ---- NPT Equilibration ----
fix             2 all npt temp 298.15 298.15 100.0 iso 1.0 1.0 1000.0
run             1000000
unfix           2

# ---- Production Run (NVT for transport) ----
reset_timestep  0
fix             3 all nvt temp 298.15 298.15 100.0

# Output trajectories for analysis
dump            1 all custom 5000 traj.lammpstrj id type x y z vx vy vz
dump_modify     1 sort id

# Compute MSD
group           Li type 1
group           PF6 type 2 3
compute         msd_Li Li msd
compute         msd_PF6 PF6 msd
fix             msd_out all ave/time 100 1 100 c_msd_Li[4] c_msd_PF6[4] &
                file msd_output.dat

# Compute VACF for Green-Kubo conductivity
compute         vacf_Li Li vacf
fix             vacf_out Li ave/correlate 1 10000 10000 c_vacf_Li[1] c_vacf_Li[2] &
                c_vacf_Li[3] c_vacf_Li[4] type auto file vacf_Li.dat ave running

# Compute charge flux for ionic conductivity
compute         flux all heat/flux ke_atom pe_atom stress/atom NULL
# Custom ionic current computation would use fix ave/correlate

thermo          5000
run             50000000

write_data      final.data
