units           metal
dimension       3
boundary        p p p
atom_style      charge

read_data       interface.data
pair_style      buck/coul/long 10.0
kspace_style    pppm 1.0e-5
pair_coeff      * * 0.0 1.0 0.0

neighbor        2.0 bin
neigh_modify    every 1 delay 0 check yes
timestep        0.001

thermo          200
thermo_style    custom step temp pe ke etotal press
min_style       cg
minimize        1.0e-8 1.0e-10 2000 10000

velocity        all create 600.0 4928459 rot yes dist gaussian
fix             1 all nvt temp 600.0 600.0 0.1
run             20000
unfix           1

write_data      interface_equilibrated.data
