// SBML level 3 version 2
// SBML Model: Plant PTI-ETI Signaling Network
// Compatible with COPASI and CellDesigner

model PlantImmunityModel()
  // PTI-ETI Signaling Network

  // Compartments:
  compartment apoplast = 1; apoplast is "Apoplast";
  compartment cytoplasm = 1; cytoplasm is "Cytoplasm";
  compartment nucleus = 1; nucleus is "Nucleus";

  // Species:
  species FLS2 in cytoplasm = 10;
  species flg22 in apoplast = 5;
  species FLS2_flg22 in cytoplasm = 0; FLS2_flg22 is "FLS2:flg22 Complex";
  species BAK1 in cytoplasm = 5;
  species FLS2_BAK1 in cytoplasm = 0; FLS2_BAK1 is "FLS2:BAK1 Active Complex";
  species NLR in cytoplasm = 5; NLR is "NLR Receptor";
  species Effector in cytoplasm = 0; Effector is "Pathogen Effector";
  species NLR_Eff in cytoplasm = 0; NLR_Eff is "NLR:Effector Complex";
  species MAPKKK in cytoplasm = 1; MAPKKK is "MAPKKK (MEKK1)";
  species MAPKKK_P in cytoplasm = 0; MAPKKK_P is "MAPKKK-P";
  species MAPKK in cytoplasm = 1; MAPKK is "MAPKK (MKK4/5)";
  species MAPKK_P in cytoplasm = 0; MAPKK_P is "MAPKK-P";
  species MAPK in cytoplasm = 1; MAPK is "MAPK (MPK3/6)";
  species MAPK_P in cytoplasm = 0; MAPK_P is "MAPK-P";
  species SA in cytoplasm = 0; SA is "Salicylic Acid";
  species JA in cytoplasm = 0; JA is "Jasmonic Acid";
  species NPR1_inactive in cytoplasm = 5; NPR1_inactive is "NPR1 (inactive)";
  species NPR1_active in nucleus = 0; NPR1_active is "NPR1 (active)";
  species JAZ in nucleus = 5; JAZ is "JAZ Repressor";
  species WRKY33 in nucleus = 0;
  species WRKY70 in nucleus = 0;
  species TGA2 in nucleus = 1;
  species MYC2 in nucleus = 0;
  species PR1 in cytoplasm = 0;
  species PDF12 in cytoplasm = 0; PDF12 is "PDF1.2";
  species ROS in apoplast = 0; ROS is "Reactive Oxygen Species";
  species Callose in cytoplasm = 0; Callose is "Callose Deposit";

  // Reactions:
  PAMP_binding: FLS2 + flg22 => FLS2_flg22; 0.1*FLS2*flg22;
  Co_receptor_recruitment: FLS2_flg22 + BAK1 => FLS2_BAK1; 0.05*FLS2_flg22*BAK1; Co_receptor_recruitment is "Co-receptor recruitment";
  MAPKKK_activation: MAPKKK => MAPKKK_P; 0.5*FLS2_BAK1*MAPKKK/(0.5 + MAPKKK);
  SA_biosynthesis: => SA; 0.3*MAPK_P;
  NPR1_activation: NPR1_inactive => NPR1_active; 0.2*SA*NPR1_inactive/(1 + SA);
  PR1_transcription: => PR1; 1*NPR1_active*TGA2/(0.5 + NPR1_active);
end
