# LAMMPS AdResS: Adaptive Resolution BCP Simulation
# AA core (defect study) <-> CG bulk
# Requires LAMMPS with 'user-adress' package

units           real
atom_style      full
boundary        p p p

# Simulation box: 60nm x 60nm x 30nm
region          box block 0 600 0 600 0 300 units box
create_box      6 box

# Atom types: 1-4 = CG beads, 5-6 = AA atoms
# (generated externally: adress_initial.data)
read_data       adress_initial.data

# ── Force field ────────────────────────────────────────────
pair_style      hybrid/overlay lj/cut 12.0 lj/cut 12.0

# CG pairs (outer region): types 1-4
pair_coeff  1 1 lj/cut 1  3.1 4.3 12.0
pair_coeff  2 2 lj/cut 1  2.7 4.3 12.0
pair_coeff  3 3 lj/cut 1  2.5 4.3 12.0
pair_coeff  4 4 lj/cut 1  2.7 4.3 12.0

# AA pairs (inner region): types 5-6
# [OPLS-AA or DREIDING parameters for PS/PMMA]
pair_coeff  5 5 lj/cut 2  0.2094 3.85 10.0  # PS aromatic C
pair_coeff  6 6 lj/cut 2  0.2260 3.50 10.0  # PMMA C

# ── AdResS resolution function ─────────────────────────────
# w(r) = 0 in AA region, 1 in CG region
# Hybrid zone: smooth polynomial transition
variable R_AA  equal 50.0   # 5 nm AA core radius (in Angstrom)
variable R_HY  equal 100.0  # 10 nm hybrid zone outer radius

fix adress all adress 3.0 ${R_AA} ${R_HY} 0.0 0.0 0.0

# ── Thermodynamic force (compensate for density artifact) ──
fix tf all adress/tf 5 0 0 0 adress_tf_forces.dat

# ── Dynamics ───────────────────────────────────────────────
fix     1 all nvt temp 500.0 500.0 500.0
timestep 1.0
thermo  1000
dump    adress all custom 5000 adress_trajectory.lammpstrj id type x y z

run     2000000
write_data adress_final.data
