# LAMMPS: Defect Annealing Protocol for DSA BCP
# Starts from a defective lamellar structure, anneals defects

units           real
atom_style      molecular
boundary        p p p
read_restart    defective_lam.restart

include         forcefield.inc

# ── Thermal annealing: stepwise temperature ramp ─────────
variable        T_start equal 440.0
variable        T_ann   equal 500.0
variable        T_end   equal 440.0

fix             ann1 all nvt temp ${T_start} ${T_ann} 500.0
dump            def1 all custom 5000 defect_ann1.lammpstrj id mol type x y z
run             1000000   # 10 ns ramp-up

unfix           ann1
fix             ann2 all nvt temp ${T_ann} ${T_ann} 500.0
run             5000000   # 50 ns hold (defect annihilation)
write_restart   mid_anneal.restart

# ── Solvent vapor anneal (reduced chi): lower T_glass ────
# Simulate SVA by reducing epsilon_cross temporarily
variable        eps_cross equal 1.5   # reduced from 1.9 (solvent swelling)
pair_coeff  2 3  ${eps_cross}  4.300  12.0
fix             sva all nvt temp ${T_ann} ${T_ann} 500.0
run             2000000   # 20 ns SVA

# ── Remove solvent (restore chi) and cool ────────────────
pair_coeff  2 3  1.9  4.300  12.0
fix             cool all nvt temp ${T_ann} ${T_end} 1000.0
run             2000000   # 20 ns cool
write_data      defect_annealed.data
