# LAMMPS MD: Li6PS5Cl / LiCoO2 Interface Interdiffusion
# Potential: ReaxFF (van Duin parameterization for Li-P-S-Co-O system)
# System: 10nm × 10nm × 40nm supercell (LPS 20nm | LCO 20nm)

units           real
atom_style      charge
boundary        p p p

# Read interface structure (generated by 01_interface_builder.py)
read_data       interface_LPS_LCO.lammps

# ReaxFF force field
pair_style      reax/c NULL
pair_coeff      * * ffield.reax Li P S Cl Co O

compute         reax all pair reax/c

neighbor        2.0 bin
neigh_modify    every 5 delay 0 check yes

# Charge equilibration (QEq)
fix             qeq all qeq/reax 1 0.0 10.0 1e-6 reax/c

# Output
dump            1 all custom 100 traj_md.lammpstrj id type x y z q vx vy vz
dump_modify     1 sort id
thermo          100
thermo_style    custom step temp press pe ke etotal lx ly lz

# Stage 1: Equilibration at 300 K (NPT)
velocity        all create 300.0 12345 rot yes dist gaussian
fix             npt1 all npt temp 300 300 100.0 aniso 0 0 1000.0
run             50000   # 100 ps
unfix           npt1

# Stage 2: Heating to target temperature (NVT)
variable        T_target equal 700   # K  (change to 800, 900, 1000 for Arrhenius)
fix             nvt1 all nvt temp 300 ${T_target} 100.0
run             100000  # 200 ps
unfix           nvt1

# Stage 3: Production at T_target (NVT)
fix             nvt2 all nvt temp ${T_target} ${T_target} 100.0
fix             msd  all msd 10 msd_Li.txt com yes  # MSD for Li atoms (type 1)
run             500000  # 1 ns

# Stage 4: Cooling (300K quench)
fix             nvt3 all nvt temp ${T_target} 300 100.0
run             100000

write_data      final_structure.lammps
write_restart   restart.end
