// SBML level 2 version 4

model PlantImmunity_PTI_ETI()
  // Plant PTI-ETI Signaling Model
  // Integrated plant innate immunity model: PTI and ETI signaling pathways.
  // Includes receptor binding, MAPK cascade, SA/JA crosstalk, and transcriptional regulation.
  // Designed for CellDesigner visualization and COPASI simulation.

  // Compartments:
  compartment apoplast = 1; apoplast is "Apoplast";
  compartment plasma_membrane = 1; plasma_membrane is "Plasma Membrane";
  compartment cytoplasm = 1; cytoplasm is "Cytoplasm";
  compartment nucleus = 1; nucleus is "Nucleus";
  compartment chloroplast = 1; chloroplast is "Chloroplast";

  // Species:
  species flg22 in apoplast = 10;
  species FLS2 in plasma_membrane = 5;
  species BAK1 in plasma_membrane = 3;
  species FLS2_flg22 in plasma_membrane = 0; FLS2_flg22 is "FLS2:flg22";
  species FLS2_BAK1_flg22 in plasma_membrane = 0; FLS2_BAK1_flg22 is "FLS2:BAK1:flg22";
  species BIK1 in plasma_membrane = 2;
  species BIK1_P in cytoplasm = 0; BIK1_P is "BIK1-P";
  species AvrPita in cytoplasm = 5;
  species Pita in cytoplasm = 4; Pita is "Pita (NLR)";
  species Pita_active in cytoplasm = 0; Pita_active is "Pita-active";
  species MEKK1 in cytoplasm = 1; MEKK1 is "MEKK1 (MAPKKK)";
  species MEKK1_P in cytoplasm = 0; MEKK1_P is "MEKK1-P";
  species MKK4 in cytoplasm = 1; MKK4 is "MKK4/5 (MAPKK)";
  species MKK4_PP in cytoplasm = 0; MKK4_PP is "MKK4/5-PP";
  species MPK3 in cytoplasm = 1; MPK3 is "MPK3/6 (MAPK)";
  species MPK3_PP in cytoplasm = 0; MPK3_PP is "MPK3/6-PP";
  species ICS1 in chloroplast = 0.5;
  species SA in cytoplasm = 0.1; SA is "Salicylic Acid";
  species NPR1_oligomer in cytoplasm = 1; NPR1_oligomer is "NPR1-oligomer";
  species NPR1_monomer in nucleus = 0; NPR1_monomer is "NPR1-monomer";
  species JA in cytoplasm = 0.1; JA is "Jasmonic Acid";
  species JAZ in nucleus = 1; JAZ is "JAZ repressor";
  species COI1 in nucleus = 0.5;
  species WRKY33 in nucleus = 0.01;
  species WRKY70 in nucleus = 0.01;
  species WRKY29 in nucleus = 0.01;
  species TGA in nucleus = 0.01; TGA is "TGA2/5/6";
  species MYC2 in nucleus = 0.01;
  species PR1 in cytoplasm = 0;
  species PDF12 in cytoplasm = 0; PDF12 is "PDF1.2";
  species FRK1 in cytoplasm = 0;
  species ROS in apoplast = 0;
  species RBOHD in plasma_membrane = 1;
  species HR in cytoplasm = 0; HR is "Hypersensitive Response";

  // Parameters:
  kon_flg22_FLS2 = 0.01;
  koff_flg22_FLS2 = 0.001;
  kon_BAK1 = 0.005;
  koff_BAK1 = 0.0005;
  kcat_BIK1 = 0.02;
  Vm_MEKK1 = 1;
  Km_MEKK1 = 0.5;
  Vm_MKK4 = 0.8;
  Km_MKK4 = 0.5;
  Vm_MPK3 = 0.6;
  Km_MPK3 = 0.5;
  Vp_MEKK1 = 0.3;
  Vp_MKK4 = 0.3;
  Vp_MPK3 = 0.3;
  k_SA_synthesis = 0.4;
  k_SA_degradation = 0.05;
  k_JA_synthesis = 0.2;
  k_JA_degradation = 0.05;
  k_SA_inhibits_JA = 2;
  k_JA_inhibits_SA = 2;
  k_NPR1_activation = 0.5;
  k_NPR1_degradation = 0.1;

  // Reactions:
  flg22_FLS2_binding: flg22 + FLS2 -> FLS2_flg22; kon_flg22_FLS2*flg22*FLS2 - koff_flg22_FLS2*FLS2_flg22; flg22_FLS2_binding is "flg22-FLS2 binding";
  BAK1_co_receptor_recruitment: FLS2_flg22 + BAK1 -> FLS2_BAK1_flg22; kon_BAK1*FLS2_flg22*BAK1 - koff_BAK1*FLS2_BAK1_flg22; BAK1_co_receptor_recruitment is "BAK1 co-receptor recruitment";
  MEKK1_activation: MEKK1 => MEKK1_P; Vm_MEKK1*FLS2_BAK1_flg22*MEKK1/(Km_MEKK1 + MEKK1);  // modifiers: FLS2_BAK1_flg22
  MKK4_5_activation: MKK4 => MKK4_PP; Vm_MKK4*MEKK1_P*MKK4/(Km_MKK4 + MKK4); MKK4_5_activation is "MKK4/5 activation";  // modifiers: MEKK1_P
  MPK3_6_activation: MPK3 => MPK3_PP; Vm_MPK3*MKK4_PP*MPK3/(Km_MPK3 + MPK3); MPK3_6_activation is "MPK3/6 activation";  // modifiers: MKK4_PP
  SA_synthesis_via_ICS1: => SA; k_SA_synthesis*MPK3_PP/(1 + k_JA_inhibits_SA*JA);  // modifiers: MPK3_PP, JA
  NPR1_monomerization: NPR1_oligomer => NPR1_monomer; k_NPR1_activation*SA*SA*NPR1_oligomer/(1 + SA*SA);  // modifiers: SA
  PR1_transcription: => PR1; 0.8*TGA*NPR1_monomer/(1 + TGA*NPR1_monomer);  // modifiers: TGA, NPR1_monomer
  ROS_burst_via_RBOHD: => ROS; 0.8*BIK1_P*RBOHD;  // modifiers: BIK1_P, RBOHD
end
